# LAMMPS Input File
# Licensed under CC BY 4.0
# A Set of Materials-Science Tutorials for the LAMMPS Simulation Package: 2. Materials Science
# By Simon Gravelle, Mark A. Tschopp, Jacob R. Gissinger, and Axel Kohlmeyer
# Tutorial 18: 3. A stepped TiO2 (110) surface -- charge redistribution at edges
#
# Same (110) slab as surface110.lmp, but wider, and with the top O-Ti2O2-O
# trilayer removed over half of the surface.  This carves two terraces
# joined by monatomic steps along [001].  Because the cut plane lies in the
# gap between trilayers and a trilayer is charge neutral, the deleted patch
# is exactly stoichiometric.  After relaxation, the charges at the step
# edges differ from both the flat terrace and the bulk -- local chemistry
# made visible by the charge-transfer potential.

# 1) Initialization
units metal
dimension 3
boundary p p s
atom_style charge

# 2) System definition (see surface110.lmp for the rotated-cell derivation)
lattice custom 1.0 &
    a1 6.5062 0.0 0.0  a2 0.0 2.9646 0.0  a3 0.0 0.0 6.5062 &
    basis 0.0    0.0  0.0    basis 0.5    0.0  0.5 &
    basis 0.0    0.5  0.5    basis 0.5    0.5  0.0 &
    basis 0.0    0.0  0.3048 basis 0.5    0.0  0.8048 &
    basis 0.0    0.0  0.6952 basis 0.5    0.0  0.1952 &
    basis 0.3048 0.5  0.5    basis 0.8048 0.5  0.0 &
    basis 0.6952 0.5  0.5    basis 0.1952 0.5  0.0 &
    origin 0.0 0.0 0.25
region box block 0 4 0 6 0 3
create_box 2 box
create_atoms 1 box basis 1 1 basis 2 1 basis 3 1 basis 4 1 &
    basis 5 2 basis 6 2 basis 7 2 basis 8 2 basis 9 2 basis 10 2 &
    basis 11 2 basis 12 2
mass 1 47.867
mass 2 15.999

# 3) Carve the step: remove the top trilayer over half the surface.  The
#    z-cut at ztop-2.75 lies in the inter-trilayer gap, the x-cut at lx/2
#    creates two step edges running along y = [001].
variable ztop equal bound(all,zmax)
region terrace block $(lx/2) INF INF INF $(v_ztop-2.75) INF units box
delete_atoms region terrace

# 4) Settings
set type 1 charge  2.4
set type 2 charge -1.2
pair_style comb
pair_coeff * * ffield.comb Ti O
neighbor 0.5 bin
neigh_modify every 1 delay 0 check yes
fix q all qeq/comb 1 0.0001

# 5) Monitoring
thermo 50
thermo_style custom step pe fnorm

# 6) Relax
min_style cg
min_modify dmax 0.005 line quadratic
minimize 1.0e-10 1.0e-10 2000 10000

# 7) Charge extremes among the oxygens of the surface region
group ox type 2
variable zhi2 equal bound(all,zmax)
region rtopo block INF INF INF INF $(v_zhi2-6.0) INF units box
group gtopo region rtopo
group otop intersect gtopo ox
compute qt otop property/atom q
compute qmin otop reduce min c_qt
compute qmax otop reduce max c_qt
run 0 post no
print "--------------------------------------------------"
print "Atoms: $(count(all));  O charges near the surface span"
print "  q(O) = $(c_qmin:%.3f) ... $(c_qmax:%.3f) e  (interior: -1.60 e)"
print "--------------------------------------------------"

# 8) Save the relaxed stepped slab (with charges) for visualization
write_data step110.data
